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/batch
! ANSYS input file written by Workbench version 2026 R1
! File used for geometry attach: C:\Users\ncgru\Documents\Projects\PC-Case\FEA-Mock3\PC-Case_files\dp0\SYS\DM\SYS.scdocx
/title,PC-Case--Static Structural (A5)
/com,--- Data in consistent BIN units. See Solving Units in the help system for more information.
/units,BIN
/prep7
! Turn off shape checking because checks already performed inside WB mesher.
! See help system for more information.
SHPP,OFF,,NOWARN
etcon,set             ! allow ANSYS to choose best KEYOP's for 180x elements, resets any applicable keyopt to MAPDL defaults
/com,*********** Send User Defined Coordinate System(s) ***********
csys,0
/com,*********** Nodes for the whole assembly ***********
nblock,3,,36920
(1i9,3e20.9e3)
        1     1.754175097E+01     1.342992134E+01    -6.250000000E-01
        2     1.734973561E+01     1.268997030E+01    -6.250000000E-01
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-1
/com,*********** Elements for Body 1 'Solid' ***********
et,1,186
keyo,1,2,1          ! set full integration on SOLID186
MAT,1 $ TYPE,1 $ REAL,1 $ SECNUM,1 $ ESYS,0    ! ELEMNODES = 20
eblock,21,COMPACT,,107
(21i9)
     4971    30070    30119    30391    30390    30259    30210    30286    30287    31718    31859    32478    31720    32061    32062    32222    32173    31719    31858    32223    32225
     4972    30071    30118    30391    30119    30258    30211    30286    30210    31722    31857    31859    31723    32065    32066    32062    32060    31724    31856    32223    31858
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-1
secnum,1    ! reset the section ID to default
/com,*********** Elements for Body 2 'Solid' ***********
et,2,186
keyo,2,2,1          ! set full integration on SOLID186
MAT,2 $ TYPE,2 $ REAL,1 $ SECNUM,2 $ ESYS,0    ! ELEMNODES = 20
eblock,21,COMPACT,,32
(21i9)
        1        2     5497     4615     4614     1461     5502     4618     4617     5819    18501    18498     5818    11351    18507    18504    11350     5816    20098    18500    18499
        2        2     4614     4615     5497     2102     2111     2110     2104     5818    18498    18501     5819    13116    13147    13123    13114     5817    13152    13149    13126
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-1
secnum,1    ! reset the section ID to default
/com,*********** Elements for Body 3 'Solid' ***********
et,3,186
keyo,3,2,1          ! set full integration on SOLID186
MAT,3 $ TYPE,3 $ REAL,1 $ SECNUM,3 $ ESYS,0    ! ELEMNODES = 20
eblock,21,COMPACT,,32
(21i9)
       33        5     5554     4595     4596     1455     5530     4598     4599     5836    18473    18471     5835    11330    18479    18477    11328     5833    20165    18472    18475
       34        5     4596     4595     5554     2127     2136     2135     2134     5835    18471    18473     5836    13205    13236    13232    13204     5834    13240    13238    13235
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-1
secnum,1    ! reset the section ID to default
/com,*********** Elements for Body 4 'Solid' ***********
et,4,186
keyo,4,2,1          ! set full integration on SOLID186
MAT,4 $ TYPE,4 $ REAL,1 $ SECNUM,4 $ ESYS,0    ! ELEMNODES = 20
eblock,21,COMPACT,,6
(21i9)
       65        7     3580     3581     3582     1447     3590     3589     3588     5846    16644    16646     5847    11302    16658    16657    11301     5844    16645    16647    16649
       66        7     3582     3581     3580     1448     2198     2199     2201     5847    16646    16644     5846    11304    13445    13448    11305     5845    13446    13449    13454
       67        7     3582     3583     3586     1447     3588     3587     3585     5847    16648    16650     5848    11301    16656    16655    11300     5844    16649    16651    16654
       68        7     3586     3583     3582     1448     2196     2197     2198     5848    16650    16648     5847    11303    13438    13442    11304     5845    13440    13443    13446
       69        7     3586     3579     3580     1447     3585     3584     3590     5848    16643    16641     5846    11300    16652    16653    11302     5844    16654    16642    16645
       70        7     3580     3579     3586     1448     2201     2200     2196     5846    16641    16643     5848    11305    13451    13439    11303     5845    13454    13452    13440
-1
secnum,1    ! reset the section ID to default
/com,*********** Elements for Body 5 'Solid' ***********
et,5,186
keyo,5,2,1          ! set full integration on SOLID186
MAT,5 $ TYPE,5 $ REAL,1 $ SECNUM,5 $ ESYS,0    ! ELEMNODES = 20
eblock,21,COMPACT,,6
(21i9)
       71        8     3591     3592     3593     1449     3596     3605     3604     5851    16659    16663     5852    11306    16676    16694    11308     5849    16660    16664    16667
       72        8     3593     3592     3591     1450     3607     3608     3597     5852    16663    16659     5851    11311    16699    16678    11309     5850    16668    16665    16661
       73        8     3593     3594     3595     1449     3604     3603     3602     5852    16666    16669     5853    11308    16693    16692    11307     5849    16667    16670    16674
       74        8     3595     3594     3593     1450     3601     3606     3607     5853    16669    16666     5852    11310    16688    16695    11311     5850    16673    16671    16668
       75        8     3595     3599     3591     1449     3602     3598     3596     5853    16672    16662     5851    11307    16683    16675    11306     5849    16674    16682    16660
       76        8     3591     3599     3595     1450     3597     3600     3601     5851    16662    16672     5853    11309    16677    16685    11310     5850    16661    16684    16673
-1
secnum,1    ! reset the section ID to default
/com,*********** Elements for Body 6 'Solid' ***********
et,6,186
keyo,6,2,1          ! set full integration on SOLID186
MAT,6 $ TYPE,6 $ REAL,1 $ SECNUM,6 $ ESYS,0    ! ELEMNODES = 20
eblock,21,COMPACT,,32
(21i9)
       77       10     5522     4603     4602     1452     5493     4606     4605     5865    18488    18485     5863    11318    18491    18490    11316     5861    20091    18487    18486
       78       10     4602     4603     5522     1455     4599     4598     5530     5863    18485    18488     5865    11328    18477    18479    11330     5862    18481    18478    20149
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-1
secnum,1    ! reset the section ID to default
/com,*********** Elements for Body 7 'Solid' ***********
et,7,186
keyo,7,2,1          ! set full integration on SOLID186
MAT,7 $ TYPE,7 $ REAL,1 $ SECNUM,7 $ ESYS,0    ! ELEMNODES = 20
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/com,*********** Elements for Body 8 'Solid' ***********
et,8,186
keyo,8,2,1          ! set full integration on SOLID186
MAT,8 $ TYPE,8 $ REAL,1 $ SECNUM,8 $ ESYS,0    ! ELEMNODES = 20
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/com,*********** Elements for Body 9 'Solid' ***********
et,9,186
keyo,9,2,1          ! set full integration on SOLID186
MAT,9 $ TYPE,9 $ REAL,1 $ SECNUM,9 $ ESYS,0    ! ELEMNODES = 20
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/com,*********** Elements for Body 10 'Solid' ***********
et,10,186
keyo,10,2,1         ! set full integration on SOLID186
MAT,10 $ TYPE,10 $ REAL,1 $ SECNUM,10 $ ESYS,0    ! ELEMNODES = 20
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/com,*********** Elements for Body 11 'Solid' ***********
et,11,186
keyo,11,2,1         ! set full integration on SOLID186
MAT,11 $ TYPE,11 $ REAL,1 $ SECNUM,11 $ ESYS,0    ! ELEMNODES = 20
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/com,*********** Elements for Body 12 'Solid' ***********
et,12,186
keyo,12,2,1         ! set full integration on SOLID186
MAT,12 $ TYPE,12 $ REAL,1 $ SECNUM,12 $ ESYS,0    ! ELEMNODES = 20
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/com,*********** Elements for Body 13 'Solid1' ***********
et,13,186
keyo,13,2,1         ! set full integration on SOLID186
MAT,13 $ TYPE,13 $ REAL,1 $ SECNUM,13 $ ESYS,0    ! ELEMNODES = 20
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/com,*********** Elements for Body 14 'Solid1' ***********
et,14,186
keyo,14,2,1         ! set full integration on SOLID186
MAT,14 $ TYPE,14 $ REAL,1 $ SECNUM,14 $ ESYS,0    ! ELEMNODES = 20
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/com,*********** Elements for Body 15 'Solid1' ***********
et,15,186
keyo,15,2,1         ! set full integration on SOLID186
MAT,15 $ TYPE,15 $ REAL,1 $ SECNUM,15 $ ESYS,0    ! ELEMNODES = 20
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/com,*********** Elements for Body 16 'Solid1' ***********
et,16,186
keyo,16,2,1         ! set full integration on SOLID186
MAT,16 $ TYPE,16 $ REAL,1 $ SECNUM,16 $ ESYS,0    ! ELEMNODES = 20
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/com,*********** Elements for Body 17 'Solid1' ***********
et,17,186
keyo,17,2,1         ! set full integration on SOLID186
MAT,17 $ TYPE,17 $ REAL,1 $ SECNUM,17 $ ESYS,0    ! ELEMNODES = 20
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/com,*********** Elements for Body 18 'Solid1' ***********
et,18,186
keyo,18,2,1         ! set full integration on SOLID186
MAT,18 $ TYPE,18 $ REAL,1 $ SECNUM,18 $ ESYS,0    ! ELEMNODES = 20
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/com,*********** Elements for Body 19 'Solid1' ***********
et,19,186
keyo,19,2,1         ! set full integration on SOLID186
MAT,19 $ TYPE,19 $ REAL,1 $ SECNUM,19 $ ESYS,0    ! ELEMNODES = 20
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/com,*********** Elements for Body 20 'Solid1' ***********
et,20,186
keyo,20,2,1         ! set full integration on SOLID186
MAT,20 $ TYPE,20 $ REAL,1 $ SECNUM,20 $ ESYS,0    ! ELEMNODES = 20
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/com,*********** Elements for Body 21 'Solid11' ***********
et,21,186
keyo,21,2,1         ! set full integration on SOLID186
MAT,21 $ TYPE,21 $ REAL,1 $ SECNUM,21 $ ESYS,0    ! ELEMNODES = 20
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/com,*********** Elements for Body 22 'Solid1' ***********
et,22,186
keyo,22,2,1         ! set full integration on SOLID186
MAT,22 $ TYPE,22 $ REAL,1 $ SECNUM,22 $ ESYS,0    ! ELEMNODES = 20
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/com,*********** Elements for Body 23 'Solid11' ***********
et,23,186
keyo,23,2,1         ! set full integration on SOLID186
MAT,23 $ TYPE,23 $ REAL,1 $ SECNUM,23 $ ESYS,0    ! ELEMNODES = 20
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/com,*********** Elements for Body 24 'Solid1' ***********
et,24,186
keyo,24,2,1         ! set full integration on SOLID186
MAT,24 $ TYPE,24 $ REAL,1 $ SECNUM,24 $ ESYS,0    ! ELEMNODES = 20
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/com,*********** Elements for Body 25 'Solid1' ***********
et,25,186
keyo,25,2,1         ! set full integration on SOLID186
MAT,25 $ TYPE,25 $ REAL,1 $ SECNUM,25 $ ESYS,0    ! ELEMNODES = 20
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/com,*********** Elements for Body 26 'Solid1' ***********
et,26,186
keyo,26,2,1         ! set full integration on SOLID186
MAT,26 $ TYPE,26 $ REAL,1 $ SECNUM,26 $ ESYS,0    ! ELEMNODES = 20
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/com,*********** Elements for Body 27 'Solid1' ***********
et,27,186
keyo,27,2,1         ! set full integration on SOLID186
MAT,27 $ TYPE,27 $ REAL,1 $ SECNUM,27 $ ESYS,0    ! ELEMNODES = 20
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/com,*********** Elements for Body 28 'Solid1' ***********
et,28,186
keyo,28,2,1         ! set full integration on SOLID186
MAT,28 $ TYPE,28 $ REAL,1 $ SECNUM,28 $ ESYS,0    ! ELEMNODES = 20
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/com,*********** Elements for Body 29 'Solid1' ***********
et,29,186
keyo,29,2,1         ! set full integration on SOLID186
MAT,29 $ TYPE,29 $ REAL,1 $ SECNUM,29 $ ESYS,0    ! ELEMNODES = 20
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/com,*********** Elements for Body 30 'Solid1' ***********
et,30,186
keyo,30,2,1         ! set full integration on SOLID186
MAT,30 $ TYPE,30 $ REAL,1 $ SECNUM,30 $ ESYS,0    ! ELEMNODES = 20
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/com,*********** Elements for Body 31 'Solid1' ***********
et,31,186
keyo,31,2,1         ! set full integration on SOLID186
MAT,31 $ TYPE,31 $ REAL,1 $ SECNUM,31 $ ESYS,0    ! ELEMNODES = 20
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/com,*********** Elements for Body 32 'Solid11' ***********
et,32,186
keyo,32,2,1         ! set full integration on SOLID186
MAT,32 $ TYPE,32 $ REAL,1 $ SECNUM,32 $ ESYS,0    ! ELEMNODES = 20
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/com,*********** Elements for Body 33 'Solid11' ***********
et,33,186
keyo,33,2,1         ! set full integration on SOLID186
MAT,33 $ TYPE,33 $ REAL,1 $ SECNUM,33 $ ESYS,0    ! ELEMNODES = 20
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/com,*********** Elements for Body 34 'Solid11' ***********
et,34,186
keyo,34,2,1         ! set full integration on SOLID186
MAT,34 $ TYPE,34 $ REAL,1 $ SECNUM,34 $ ESYS,0    ! ELEMNODES = 20
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/com,*********** Elements for Body 35 'Solid111' ***********
et,35,186
keyo,35,2,1         ! set full integration on SOLID186
MAT,35 $ TYPE,35 $ REAL,1 $ SECNUM,35 $ ESYS,0    ! ELEMNODES = 20
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/com,*********** Elements for Body 36 'Solid11' ***********
et,36,186
keyo,36,2,1         ! set full integration on SOLID186
MAT,36 $ TYPE,36 $ REAL,1 $ SECNUM,36 $ ESYS,0    ! ELEMNODES = 20
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et,37,186
keyo,37,2,1         ! set full integration on SOLID186
MAT,37 $ TYPE,37 $ REAL,1 $ SECNUM,37 $ ESYS,0    ! ELEMNODES = 20
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et,38,186
keyo,38,2,1         ! set full integration on SOLID186
MAT,38 $ TYPE,38 $ REAL,1 $ SECNUM,38 $ ESYS,0    ! ELEMNODES = 20
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et,39,186
keyo,39,2,1         ! set full integration on SOLID186
MAT,39 $ TYPE,39 $ REAL,1 $ SECNUM,39 $ ESYS,0    ! ELEMNODES = 20
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et,40,186
keyo,40,2,1         ! set full integration on SOLID186
MAT,40 $ TYPE,40 $ REAL,1 $ SECNUM,40 $ ESYS,0    ! ELEMNODES = 20
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et,41,186
keyo,41,2,1         ! set full integration on SOLID186
MAT,41 $ TYPE,41 $ REAL,1 $ SECNUM,41 $ ESYS,0    ! ELEMNODES = 20
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et,42,186
keyo,42,2,1         ! set full integration on SOLID186
MAT,42 $ TYPE,42 $ REAL,1 $ SECNUM,42 $ ESYS,0    ! ELEMNODES = 20
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et,43,186
keyo,43,2,1         ! set full integration on SOLID186
MAT,43 $ TYPE,43 $ REAL,1 $ SECNUM,43 $ ESYS,0    ! ELEMNODES = 20
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et,44,186
keyo,44,2,1         ! set full integration on SOLID186
MAT,44 $ TYPE,44 $ REAL,1 $ SECNUM,44 $ ESYS,0    ! ELEMNODES = 20
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et,45,186
keyo,45,2,1         ! set full integration on SOLID186
MAT,45 $ TYPE,45 $ REAL,1 $ SECNUM,45 $ ESYS,0    ! ELEMNODES = 20
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et,46,186
keyo,46,2,1         ! set full integration on SOLID186
MAT,46 $ TYPE,46 $ REAL,1 $ SECNUM,46 $ ESYS,0    ! ELEMNODES = 20
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et,47,186
keyo,47,2,1         ! set full integration on SOLID186
MAT,47 $ TYPE,47 $ REAL,1 $ SECNUM,47 $ ESYS,0    ! ELEMNODES = 20
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et,48,186
keyo,48,2,1         ! set full integration on SOLID186
MAT,48 $ TYPE,48 $ REAL,1 $ SECNUM,48 $ ESYS,0    ! ELEMNODES = 20
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et,49,186
keyo,49,2,1         ! set full integration on SOLID186
MAT,49 $ TYPE,49 $ REAL,1 $ SECNUM,49 $ ESYS,0    ! ELEMNODES = 20
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et,50,186
keyo,50,2,1         ! set full integration on SOLID186
MAT,50 $ TYPE,50 $ REAL,1 $ SECNUM,50 $ ESYS,0    ! ELEMNODES = 20
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et,51,186
keyo,51,2,1         ! set full integration on SOLID186
MAT,51 $ TYPE,51 $ REAL,1 $ SECNUM,51 $ ESYS,0    ! ELEMNODES = 20
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et,52,186
keyo,52,2,1         ! set full integration on SOLID186
MAT,52 $ TYPE,52 $ REAL,1 $ SECNUM,52 $ ESYS,0    ! ELEMNODES = 20
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et,53,186
keyo,53,2,1         ! set full integration on SOLID186
MAT,53 $ TYPE,53 $ REAL,1 $ SECNUM,53 $ ESYS,0    ! ELEMNODES = 20
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et,54,186
keyo,54,2,1         ! set full integration on SOLID186
MAT,54 $ TYPE,54 $ REAL,1 $ SECNUM,54 $ ESYS,0    ! ELEMNODES = 20
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et,55,186
keyo,55,2,1         ! set full integration on SOLID186
MAT,55 $ TYPE,55 $ REAL,1 $ SECNUM,55 $ ESYS,0    ! ELEMNODES = 20
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et,56,186
keyo,56,2,1         ! set full integration on SOLID186
MAT,56 $ TYPE,56 $ REAL,1 $ SECNUM,56 $ ESYS,0    ! ELEMNODES = 20
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et,57,186
keyo,57,2,1         ! set full integration on SOLID186
MAT,57 $ TYPE,57 $ REAL,1 $ SECNUM,57 $ ESYS,0    ! ELEMNODES = 20
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et,58,186
keyo,58,2,1         ! set full integration on SOLID186
MAT,58 $ TYPE,58 $ REAL,1 $ SECNUM,58 $ ESYS,0    ! ELEMNODES = 20
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et,59,186
keyo,59,2,1         ! set full integration on SOLID186
MAT,59 $ TYPE,59 $ REAL,1 $ SECNUM,59 $ ESYS,0    ! ELEMNODES = 20
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et,60,186
keyo,60,2,1         ! set full integration on SOLID186
MAT,60 $ TYPE,60 $ REAL,1 $ SECNUM,60 $ ESYS,0    ! ELEMNODES = 20
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et,61,186
keyo,61,2,1         ! set full integration on SOLID186
MAT,61 $ TYPE,61 $ REAL,1 $ SECNUM,61 $ ESYS,0    ! ELEMNODES = 20
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et,62,186
keyo,62,2,1         ! set full integration on SOLID186
MAT,62 $ TYPE,62 $ REAL,1 $ SECNUM,62 $ ESYS,0    ! ELEMNODES = 20
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et,63,186
keyo,63,2,1         ! set full integration on SOLID186
MAT,63 $ TYPE,63 $ REAL,1 $ SECNUM,63 $ ESYS,0    ! ELEMNODES = 20
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et,64,186
keyo,64,2,1         ! set full integration on SOLID186
MAT,64 $ TYPE,64 $ REAL,1 $ SECNUM,64 $ ESYS,0    ! ELEMNODES = 20
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et,65,186
keyo,65,2,1         ! set full integration on SOLID186
MAT,65 $ TYPE,65 $ REAL,1 $ SECNUM,65 $ ESYS,0    ! ELEMNODES = 20
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et,66,186
keyo,66,2,1         ! set full integration on SOLID186
MAT,66 $ TYPE,66 $ REAL,1 $ SECNUM,66 $ ESYS,0    ! ELEMNODES = 20
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et,67,186
keyo,67,2,1         ! set full integration on SOLID186
MAT,67 $ TYPE,67 $ REAL,1 $ SECNUM,67 $ ESYS,0    ! ELEMNODES = 20
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et,68,186
keyo,68,2,1         ! set full integration on SOLID186
MAT,68 $ TYPE,68 $ REAL,1 $ SECNUM,68 $ ESYS,0    ! ELEMNODES = 20
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et,69,186
keyo,69,2,1         ! set full integration on SOLID186
MAT,69 $ TYPE,69 $ REAL,1 $ SECNUM,69 $ ESYS,0    ! ELEMNODES = 20
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et,70,186
keyo,70,2,1         ! set full integration on SOLID186
MAT,70 $ TYPE,70 $ REAL,1 $ SECNUM,70 $ ESYS,0    ! ELEMNODES = 20
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et,71,186
keyo,71,2,1         ! set full integration on SOLID186
MAT,71 $ TYPE,71 $ REAL,1 $ SECNUM,71 $ ESYS,0    ! ELEMNODES = 20
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et,72,186
keyo,72,2,1         ! set full integration on SOLID186
MAT,72 $ TYPE,72 $ REAL,1 $ SECNUM,72 $ ESYS,0    ! ELEMNODES = 20
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et,73,186
keyo,73,2,1         ! set full integration on SOLID186
MAT,73 $ TYPE,73 $ REAL,1 $ SECNUM,73 $ ESYS,0    ! ELEMNODES = 20
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et,74,186
keyo,74,2,1         ! set full integration on SOLID186
MAT,74 $ TYPE,74 $ REAL,1 $ SECNUM,74 $ ESYS,0    ! ELEMNODES = 20
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et,75,186
keyo,75,2,1         ! set full integration on SOLID186
MAT,75 $ TYPE,75 $ REAL,1 $ SECNUM,75 $ ESYS,0    ! ELEMNODES = 20
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et,76,186
keyo,76,2,1         ! set full integration on SOLID186
MAT,76 $ TYPE,76 $ REAL,1 $ SECNUM,76 $ ESYS,0    ! ELEMNODES = 20
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et,77,186
keyo,77,2,1         ! set full integration on SOLID186
MAT,77 $ TYPE,77 $ REAL,1 $ SECNUM,77 $ ESYS,0    ! ELEMNODES = 20
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et,78,186
keyo,78,2,1         ! set full integration on SOLID186
MAT,78 $ TYPE,78 $ REAL,1 $ SECNUM,78 $ ESYS,0    ! ELEMNODES = 20
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et,79,186
keyo,79,2,1         ! set full integration on SOLID186
MAT,79 $ TYPE,79 $ REAL,1 $ SECNUM,79 $ ESYS,0    ! ELEMNODES = 20
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et,80,186
keyo,80,2,1         ! set full integration on SOLID186
MAT,80 $ TYPE,80 $ REAL,1 $ SECNUM,80 $ ESYS,0    ! ELEMNODES = 20
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et,81,186
keyo,81,2,1         ! set full integration on SOLID186
MAT,81 $ TYPE,81 $ REAL,1 $ SECNUM,81 $ ESYS,0    ! ELEMNODES = 20
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et,82,186
keyo,82,2,1         ! set full integration on SOLID186
MAT,82 $ TYPE,82 $ REAL,1 $ SECNUM,82 $ ESYS,0    ! ELEMNODES = 20
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et,83,186
keyo,83,2,1         ! set full integration on SOLID186
MAT,83 $ TYPE,83 $ REAL,1 $ SECNUM,83 $ ESYS,0    ! ELEMNODES = 20
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et,84,186
keyo,84,2,1         ! set full integration on SOLID186
MAT,84 $ TYPE,84 $ REAL,1 $ SECNUM,84 $ ESYS,0    ! ELEMNODES = 20
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et,85,186
keyo,85,2,1         ! set full integration on SOLID186
MAT,85 $ TYPE,85 $ REAL,1 $ SECNUM,85 $ ESYS,0    ! ELEMNODES = 20
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et,86,186
keyo,86,2,1         ! set full integration on SOLID186
MAT,86 $ TYPE,86 $ REAL,1 $ SECNUM,86 $ ESYS,0    ! ELEMNODES = 20
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et,87,186
keyo,87,2,1         ! set full integration on SOLID186
MAT,87 $ TYPE,87 $ REAL,1 $ SECNUM,87 $ ESYS,0    ! ELEMNODES = 20
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et,88,186
keyo,88,2,1         ! set full integration on SOLID186
MAT,88 $ TYPE,88 $ REAL,1 $ SECNUM,88 $ ESYS,0    ! ELEMNODES = 20
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et,89,186
keyo,89,2,1         ! set full integration on SOLID186
MAT,89 $ TYPE,89 $ REAL,1 $ SECNUM,89 $ ESYS,0    ! ELEMNODES = 20
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toffst,459.67,      ! Temperature offset from absolute zero
/com,*********** Set Reference Temperature ***********
tref,71.6
/com,*********** Send Materials ***********
Temperature = 'TEMP' ! Temperature
MP,DENS,1,0.000734544492879577,	! slinch in^-3
MP,ALPX,1,6.66666666666667e-06,	! F^-1
MP,C,1,373722.969668162,	! in^2 s^-2 F^-1
MP,KXX,1,7.55607836445752,	! slinch in s^-3 F^-1
MP,RSVX,1,8.52348993288591,	! ohm cmil in^-1
MP,EX,1,29007547.5428236,	! slinch s^-2 in^-1
MP,NUXY,1,0.3,
MP,MURX,1,10000,

MP,EX,2,1450377.37714118,	! slinch s^-2 in^-1
MP,NUXY,2,0.4,

MP,EX,3,1450377.37714118,	! slinch s^-2 in^-1
MP,NUXY,3,0.4,

Temperature = 'TEMP' ! Temperature
MP,DENS,4,0.000259195954812284,	! slinch in^-3
MP,ALPX,4,1.27777777777778e-05,	! F^-1
MP,C,4,753473.729169681,	! in^2 s^-2 F^-1
MPTEMP,,,,,,,,
MPTEMP,1,-148
MPTEMP,2,32.0000000000003
MPTEMP,3,212
MPTEMP,4,392
MPDATA,KXX,4, ,14.2378997280687,17.9847154459815,20.6074864485205,21.8564250211581,	! slinch in s^-3 F^-1
MPTEMP,,,,,,,,
MPTEMP,,,,,,,,
MPTEMP,1,32.0000000000003
MPTEMP,2,68.0000000000003
MPTEMP,3,212
MPDATA,RSVX,4, ,1.21835767864193,1.33868930122385,1.82001579155152,	! ohm cmil in^-1
MPTEMP,,,,,,,,
MP,EX,4,10297679.3777024,	! slinch s^-2 in^-1
MP,NUXY,4,0.33,
MP,MURX,4,1,

Temperature = 'TEMP' ! Temperature
MP,DENS,5,0.000259195954812284,	! slinch in^-3
MP,ALPX,5,1.27777777777778e-05,	! F^-1
MP,C,5,753473.729169681,	! in^2 s^-2 F^-1
MPTEMP,,,,,,,,
MPTEMP,1,-148
MPTEMP,2,32.0000000000003
MPTEMP,3,212
MPTEMP,4,392
MPDATA,KXX,5, ,14.2378997280687,17.9847154459815,20.6074864485205,21.8564250211581,	! slinch in s^-3 F^-1
MPTEMP,,,,,,,,
MPTEMP,,,,,,,,
MPTEMP,1,32.0000000000003
MPTEMP,2,68.0000000000003
MPTEMP,3,212
MPDATA,RSVX,5, ,1.21835767864193,1.33868930122385,1.82001579155152,	! ohm cmil in^-1
MPTEMP,,,,,,,,
MP,EX,5,10297679.3777024,	! slinch s^-2 in^-1
MP,NUXY,5,0.33,
MP,MURX,5,1,

MP,EX,6,1450377.37714118,	! slinch s^-2 in^-1
MP,NUXY,6,0.4,

MP,EX,7,1450377.37714118,	! slinch s^-2 in^-1
MP,NUXY,7,0.4,

MP,EX,8,1450377.37714118,	! slinch s^-2 in^-1
MP,NUXY,8,0.4,

MP,EX,9,1450377.37714118,	! slinch s^-2 in^-1
MP,NUXY,9,0.4,

Temperature = 'TEMP' ! Temperature
MP,DENS,10,0.000734544492879577,	! slinch in^-3
MP,ALPX,10,6.66666666666667e-06,	! F^-1
MP,C,10,373722.969668162,	! in^2 s^-2 F^-1
MP,KXX,10,7.55607836445752,	! slinch in s^-3 F^-1
MP,RSVX,10,8.52348993288591,	! ohm cmil in^-1
MP,EX,10,29007547.5428236,	! slinch s^-2 in^-1
MP,NUXY,10,0.3,
MP,MURX,10,10000,

Temperature = 'TEMP' ! Temperature
MP,DENS,11,0.000734544492879577,	! slinch in^-3
MP,ALPX,11,6.66666666666667e-06,	! F^-1
MP,C,11,373722.969668162,	! in^2 s^-2 F^-1
MP,KXX,11,7.55607836445752,	! slinch in s^-3 F^-1
MP,RSVX,11,8.52348993288591,	! ohm cmil in^-1
MP,EX,11,29007547.5428236,	! slinch s^-2 in^-1
MP,NUXY,11,0.3,
MP,MURX,11,10000,

Temperature = 'TEMP' ! Temperature
MP,DENS,12,0.000734544492879577,	! slinch in^-3
MP,ALPX,12,6.66666666666667e-06,	! F^-1
MP,C,12,373722.969668162,	! in^2 s^-2 F^-1
MP,KXX,12,7.55607836445752,	! slinch in s^-3 F^-1
MP,RSVX,12,8.52348993288591,	! ohm cmil in^-1
MP,EX,12,29007547.5428236,	! slinch s^-2 in^-1
MP,NUXY,12,0.3,
MP,MURX,12,10000,

MP,EX,13,1450377.37714118,	! slinch s^-2 in^-1
MP,NUXY,13,0.4,

MP,EX,14,1450377.37714118,	! slinch s^-2 in^-1
MP,NUXY,14,0.4,

MP,EX,15,1450377.37714118,	! slinch s^-2 in^-1
MP,NUXY,15,0.4,

MP,EX,16,1450377.37714118,	! slinch s^-2 in^-1
MP,NUXY,16,0.4,

MP,EX,17,1450377.37714118,	! slinch s^-2 in^-1
MP,NUXY,17,0.4,

MP,EX,18,1450377.37714118,	! slinch s^-2 in^-1
MP,NUXY,18,0.4,

MP,EX,19,1450377.37714118,	! slinch s^-2 in^-1
MP,NUXY,19,0.4,

MP,EX,20,1450377.37714118,	! slinch s^-2 in^-1
MP,NUXY,20,0.4,

MP,EX,21,1450377.37714118,	! slinch s^-2 in^-1
MP,NUXY,21,0.4,

MP,EX,22,1450377.37714118,	! slinch s^-2 in^-1
MP,NUXY,22,0.4,

MP,EX,23,1450377.37714118,	! slinch s^-2 in^-1
MP,NUXY,23,0.4,

MP,EX,24,1450377.37714118,	! slinch s^-2 in^-1
MP,NUXY,24,0.4,

MP,EX,25,1450377.37714118,	! slinch s^-2 in^-1
MP,NUXY,25,0.4,

MP,EX,26,1450377.37714118,	! slinch s^-2 in^-1
MP,NUXY,26,0.4,

MP,EX,27,1450377.37714118,	! slinch s^-2 in^-1
MP,NUXY,27,0.4,

MP,EX,28,1450377.37714118,	! slinch s^-2 in^-1
MP,NUXY,28,0.4,

Temperature = 'TEMP' ! Temperature
MP,DENS,29,0.000259195954812284,	! slinch in^-3
MP,ALPX,29,1.27777777777778e-05,	! F^-1
MP,C,29,753473.729169681,	! in^2 s^-2 F^-1
MPTEMP,,,,,,,,
MPTEMP,1,-148
MPTEMP,2,32.0000000000003
MPTEMP,3,212
MPTEMP,4,392
MPDATA,KXX,29, ,14.2378997280687,17.9847154459815,20.6074864485205,21.8564250211581,	! slinch in s^-3 F^-1
MPTEMP,,,,,,,,
MPTEMP,,,,,,,,
MPTEMP,1,32.0000000000003
MPTEMP,2,68.0000000000003
MPTEMP,3,212
MPDATA,RSVX,29, ,1.21835767864193,1.33868930122385,1.82001579155152,	! ohm cmil in^-1
MPTEMP,,,,,,,,
MP,EX,29,10297679.3777024,	! slinch s^-2 in^-1
MP,NUXY,29,0.33,
MP,MURX,29,1,

Temperature = 'TEMP' ! Temperature
MP,DENS,30,0.000259195954812284,	! slinch in^-3
MP,ALPX,30,1.27777777777778e-05,	! F^-1
MP,C,30,753473.729169681,	! in^2 s^-2 F^-1
MPTEMP,,,,,,,,
MPTEMP,1,-148
MPTEMP,2,32.0000000000003
MPTEMP,3,212
MPTEMP,4,392
MPDATA,KXX,30, ,14.2378997280687,17.9847154459815,20.6074864485205,21.8564250211581,	! slinch in s^-3 F^-1
MPTEMP,,,,,,,,
MPTEMP,,,,,,,,
MPTEMP,1,32.0000000000003
MPTEMP,2,68.0000000000003
MPTEMP,3,212
MPDATA,RSVX,30, ,1.21835767864193,1.33868930122385,1.82001579155152,	! ohm cmil in^-1
MPTEMP,,,,,,,,
MP,EX,30,10297679.3777024,	! slinch s^-2 in^-1
MP,NUXY,30,0.33,
MP,MURX,30,1,

Temperature = 'TEMP' ! Temperature
MP,DENS,31,0.000259195954812284,	! slinch in^-3
MP,ALPX,31,1.27777777777778e-05,	! F^-1
MP,C,31,753473.729169681,	! in^2 s^-2 F^-1
MPTEMP,,,,,,,,
MPTEMP,1,-148
MPTEMP,2,32.0000000000003
MPTEMP,3,212
MPTEMP,4,392
MPDATA,KXX,31, ,14.2378997280687,17.9847154459815,20.6074864485205,21.8564250211581,	! slinch in s^-3 F^-1
MPTEMP,,,,,,,,
MPTEMP,,,,,,,,
MPTEMP,1,32.0000000000003
MPTEMP,2,68.0000000000003
MPTEMP,3,212
MPDATA,RSVX,31, ,1.21835767864193,1.33868930122385,1.82001579155152,	! ohm cmil in^-1
MPTEMP,,,,,,,,
MP,EX,31,10297679.3777024,	! slinch s^-2 in^-1
MP,NUXY,31,0.33,
MP,MURX,31,1,

Temperature = 'TEMP' ! Temperature
MP,DENS,32,0.000259195954812284,	! slinch in^-3
MP,ALPX,32,1.27777777777778e-05,	! F^-1
MP,C,32,753473.729169681,	! in^2 s^-2 F^-1
MPTEMP,,,,,,,,
MPTEMP,1,-148
MPTEMP,2,32.0000000000003
MPTEMP,3,212
MPTEMP,4,392
MPDATA,KXX,32, ,14.2378997280687,17.9847154459815,20.6074864485205,21.8564250211581,	! slinch in s^-3 F^-1
MPTEMP,,,,,,,,
MPTEMP,,,,,,,,
MPTEMP,1,32.0000000000003
MPTEMP,2,68.0000000000003
MPTEMP,3,212
MPDATA,RSVX,32, ,1.21835767864193,1.33868930122385,1.82001579155152,	! ohm cmil in^-1
MPTEMP,,,,,,,,
MP,EX,32,10297679.3777024,	! slinch s^-2 in^-1
MP,NUXY,32,0.33,
MP,MURX,32,1,

Temperature = 'TEMP' ! Temperature
MP,DENS,33,0.000259195954812284,	! slinch in^-3
MP,ALPX,33,1.27777777777778e-05,	! F^-1
MP,C,33,753473.729169681,	! in^2 s^-2 F^-1
MPTEMP,,,,,,,,
MPTEMP,1,-148
MPTEMP,2,32.0000000000003
MPTEMP,3,212
MPTEMP,4,392
MPDATA,KXX,33, ,14.2378997280687,17.9847154459815,20.6074864485205,21.8564250211581,	! slinch in s^-3 F^-1
MPTEMP,,,,,,,,
MPTEMP,,,,,,,,
MPTEMP,1,32.0000000000003
MPTEMP,2,68.0000000000003
MPTEMP,3,212
MPDATA,RSVX,33, ,1.21835767864193,1.33868930122385,1.82001579155152,	! ohm cmil in^-1
MPTEMP,,,,,,,,
MP,EX,33,10297679.3777024,	! slinch s^-2 in^-1
MP,NUXY,33,0.33,
MP,MURX,33,1,

Temperature = 'TEMP' ! Temperature
MP,DENS,34,0.000259195954812284,	! slinch in^-3
MP,ALPX,34,1.27777777777778e-05,	! F^-1
MP,C,34,753473.729169681,	! in^2 s^-2 F^-1
MPTEMP,,,,,,,,
MPTEMP,1,-148
MPTEMP,2,32.0000000000003
MPTEMP,3,212
MPTEMP,4,392
MPDATA,KXX,34, ,14.2378997280687,17.9847154459815,20.6074864485205,21.8564250211581,	! slinch in s^-3 F^-1
MPTEMP,,,,,,,,
MPTEMP,,,,,,,,
MPTEMP,1,32.0000000000003
MPTEMP,2,68.0000000000003
MPTEMP,3,212
MPDATA,RSVX,34, ,1.21835767864193,1.33868930122385,1.82001579155152,	! ohm cmil in^-1
MPTEMP,,,,,,,,
MP,EX,34,10297679.3777024,	! slinch s^-2 in^-1
MP,NUXY,34,0.33,
MP,MURX,34,1,

Temperature = 'TEMP' ! Temperature
MP,DENS,35,0.000259195954812284,	! slinch in^-3
MP,ALPX,35,1.27777777777778e-05,	! F^-1
MP,C,35,753473.729169681,	! in^2 s^-2 F^-1
MPTEMP,,,,,,,,
MPTEMP,1,-148
MPTEMP,2,32.0000000000003
MPTEMP,3,212
MPTEMP,4,392
MPDATA,KXX,35, ,14.2378997280687,17.9847154459815,20.6074864485205,21.8564250211581,	! slinch in s^-3 F^-1
MPTEMP,,,,,,,,
MPTEMP,,,,,,,,
MPTEMP,1,32.0000000000003
MPTEMP,2,68.0000000000003
MPTEMP,3,212
MPDATA,RSVX,35, ,1.21835767864193,1.33868930122385,1.82001579155152,	! ohm cmil in^-1
MPTEMP,,,,,,,,
MP,EX,35,10297679.3777024,	! slinch s^-2 in^-1
MP,NUXY,35,0.33,
MP,MURX,35,1,

Temperature = 'TEMP' ! Temperature
MP,DENS,36,0.000259195954812284,	! slinch in^-3
MP,ALPX,36,1.27777777777778e-05,	! F^-1
MP,C,36,753473.729169681,	! in^2 s^-2 F^-1
MPTEMP,,,,,,,,
MPTEMP,1,-148
MPTEMP,2,32.0000000000003
MPTEMP,3,212
MPTEMP,4,392
MPDATA,KXX,36, ,14.2378997280687,17.9847154459815,20.6074864485205,21.8564250211581,	! slinch in s^-3 F^-1
MPTEMP,,,,,,,,
MPTEMP,,,,,,,,
MPTEMP,1,32.0000000000003
MPTEMP,2,68.0000000000003
MPTEMP,3,212
MPDATA,RSVX,36, ,1.21835767864193,1.33868930122385,1.82001579155152,	! ohm cmil in^-1
MPTEMP,,,,,,,,
MP,EX,36,10297679.3777024,	! slinch s^-2 in^-1
MP,NUXY,36,0.33,
MP,MURX,36,1,

Temperature = 'TEMP' ! Temperature
MP,DENS,37,0.000259195954812284,	! slinch in^-3
MP,ALPX,37,1.27777777777778e-05,	! F^-1
MP,C,37,753473.729169681,	! in^2 s^-2 F^-1
MPTEMP,,,,,,,,
MPTEMP,1,-148
MPTEMP,2,32.0000000000003
MPTEMP,3,212
MPTEMP,4,392
MPDATA,KXX,37, ,14.2378997280687,17.9847154459815,20.6074864485205,21.8564250211581,	! slinch in s^-3 F^-1
MPTEMP,,,,,,,,
MPTEMP,,,,,,,,
MPTEMP,1,32.0000000000003
MPTEMP,2,68.0000000000003
MPTEMP,3,212
MPDATA,RSVX,37, ,1.21835767864193,1.33868930122385,1.82001579155152,	! ohm cmil in^-1
MPTEMP,,,,,,,,
MP,EX,37,10297679.3777024,	! slinch s^-2 in^-1
MP,NUXY,37,0.33,
MP,MURX,37,1,

Temperature = 'TEMP' ! Temperature
MP,DENS,38,0.000259195954812284,	! slinch in^-3
MP,ALPX,38,1.27777777777778e-05,	! F^-1
MP,C,38,753473.729169681,	! in^2 s^-2 F^-1
MPTEMP,,,,,,,,
MPTEMP,1,-148
MPTEMP,2,32.0000000000003
MPTEMP,3,212
MPTEMP,4,392
MPDATA,KXX,38, ,14.2378997280687,17.9847154459815,20.6074864485205,21.8564250211581,	! slinch in s^-3 F^-1
MPTEMP,,,,,,,,
MPTEMP,,,,,,,,
MPTEMP,1,32.0000000000003
MPTEMP,2,68.0000000000003
MPTEMP,3,212
MPDATA,RSVX,38, ,1.21835767864193,1.33868930122385,1.82001579155152,	! ohm cmil in^-1
MPTEMP,,,,,,,,
MP,EX,38,10297679.3777024,	! slinch s^-2 in^-1
MP,NUXY,38,0.33,
MP,MURX,38,1,

Temperature = 'TEMP' ! Temperature
MP,DENS,39,0.000259195954812284,	! slinch in^-3
MP,ALPX,39,1.27777777777778e-05,	! F^-1
MP,C,39,753473.729169681,	! in^2 s^-2 F^-1
MPTEMP,,,,,,,,
MPTEMP,1,-148
MPTEMP,2,32.0000000000003
MPTEMP,3,212
MPTEMP,4,392
MPDATA,KXX,39, ,14.2378997280687,17.9847154459815,20.6074864485205,21.8564250211581,	! slinch in s^-3 F^-1
MPTEMP,,,,,,,,
MPTEMP,,,,,,,,
MPTEMP,1,32.0000000000003
MPTEMP,2,68.0000000000003
MPTEMP,3,212
MPDATA,RSVX,39, ,1.21835767864193,1.33868930122385,1.82001579155152,	! ohm cmil in^-1
MPTEMP,,,,,,,,
MP,EX,39,10297679.3777024,	! slinch s^-2 in^-1
MP,NUXY,39,0.33,
MP,MURX,39,1,

Temperature = 'TEMP' ! Temperature
MP,DENS,40,0.000259195954812284,	! slinch in^-3
MP,ALPX,40,1.27777777777778e-05,	! F^-1
MP,C,40,753473.729169681,	! in^2 s^-2 F^-1
MPTEMP,,,,,,,,
MPTEMP,1,-148
MPTEMP,2,32.0000000000003
MPTEMP,3,212
MPTEMP,4,392
MPDATA,KXX,40, ,14.2378997280687,17.9847154459815,20.6074864485205,21.8564250211581,	! slinch in s^-3 F^-1
MPTEMP,,,,,,,,
MPTEMP,,,,,,,,
MPTEMP,1,32.0000000000003
MPTEMP,2,68.0000000000003
MPTEMP,3,212
MPDATA,RSVX,40, ,1.21835767864193,1.33868930122385,1.82001579155152,	! ohm cmil in^-1
MPTEMP,,,,,,,,
MP,EX,40,10297679.3777024,	! slinch s^-2 in^-1
MP,NUXY,40,0.33,
MP,MURX,40,1,

Temperature = 'TEMP' ! Temperature
MP,DENS,41,0.000734544492879577,	! slinch in^-3
MP,ALPX,41,6.66666666666667e-06,	! F^-1
MP,C,41,373722.969668162,	! in^2 s^-2 F^-1
MP,KXX,41,7.55607836445752,	! slinch in s^-3 F^-1
MP,RSVX,41,8.52348993288591,	! ohm cmil in^-1
MP,EX,41,29007547.5428236,	! slinch s^-2 in^-1
MP,NUXY,41,0.3,
MP,MURX,41,10000,

Temperature = 'TEMP' ! Temperature
MP,DENS,42,0.000734544492879577,	! slinch in^-3
MP,ALPX,42,6.66666666666667e-06,	! F^-1
MP,C,42,373722.969668162,	! in^2 s^-2 F^-1
MP,KXX,42,7.55607836445752,	! slinch in s^-3 F^-1
MP,RSVX,42,8.52348993288591,	! ohm cmil in^-1
MP,EX,42,29007547.5428236,	! slinch s^-2 in^-1
MP,NUXY,42,0.3,
MP,MURX,42,10000,

Temperature = 'TEMP' ! Temperature
MP,DENS,43,0.000734544492879577,	! slinch in^-3
MP,ALPX,43,6.66666666666667e-06,	! F^-1
MP,C,43,373722.969668162,	! in^2 s^-2 F^-1
MP,KXX,43,7.55607836445752,	! slinch in s^-3 F^-1
MP,RSVX,43,8.52348993288591,	! ohm cmil in^-1
MP,EX,43,29007547.5428236,	! slinch s^-2 in^-1
MP,NUXY,43,0.3,
MP,MURX,43,10000,

Temperature = 'TEMP' ! Temperature
MP,DENS,44,0.000734544492879577,	! slinch in^-3
MP,ALPX,44,6.66666666666667e-06,	! F^-1
MP,C,44,373722.969668162,	! in^2 s^-2 F^-1
MP,KXX,44,7.55607836445752,	! slinch in s^-3 F^-1
MP,RSVX,44,8.52348993288591,	! ohm cmil in^-1
MP,EX,44,29007547.5428236,	! slinch s^-2 in^-1
MP,NUXY,44,0.3,
MP,MURX,44,10000,

Temperature = 'TEMP' ! Temperature
MP,DENS,45,0.000734544492879577,	! slinch in^-3
MP,ALPX,45,6.66666666666667e-06,	! F^-1
MP,C,45,373722.969668162,	! in^2 s^-2 F^-1
MP,KXX,45,7.55607836445752,	! slinch in s^-3 F^-1
MP,RSVX,45,8.52348993288591,	! ohm cmil in^-1
MP,EX,45,29007547.5428236,	! slinch s^-2 in^-1
MP,NUXY,45,0.3,
MP,MURX,45,10000,

Temperature = 'TEMP' ! Temperature
MP,DENS,46,0.000734544492879577,	! slinch in^-3
MP,ALPX,46,6.66666666666667e-06,	! F^-1
MP,C,46,373722.969668162,	! in^2 s^-2 F^-1
MP,KXX,46,7.55607836445752,	! slinch in s^-3 F^-1
MP,RSVX,46,8.52348993288591,	! ohm cmil in^-1
MP,EX,46,29007547.5428236,	! slinch s^-2 in^-1
MP,NUXY,46,0.3,
MP,MURX,46,10000,

Temperature = 'TEMP' ! Temperature
MP,DENS,47,0.000734544492879577,	! slinch in^-3
MP,ALPX,47,6.66666666666667e-06,	! F^-1
MP,C,47,373722.969668162,	! in^2 s^-2 F^-1
MP,KXX,47,7.55607836445752,	! slinch in s^-3 F^-1
MP,RSVX,47,8.52348993288591,	! ohm cmil in^-1
MP,EX,47,29007547.5428236,	! slinch s^-2 in^-1
MP,NUXY,47,0.3,
MP,MURX,47,10000,

Temperature = 'TEMP' ! Temperature
MP,DENS,48,0.000734544492879577,	! slinch in^-3
MP,ALPX,48,6.66666666666667e-06,	! F^-1
MP,C,48,373722.969668162,	! in^2 s^-2 F^-1
MP,KXX,48,7.55607836445752,	! slinch in s^-3 F^-1
MP,RSVX,48,8.52348993288591,	! ohm cmil in^-1
MP,EX,48,29007547.5428236,	! slinch s^-2 in^-1
MP,NUXY,48,0.3,
MP,MURX,48,10000,

Temperature = 'TEMP' ! Temperature
MP,DENS,49,0.000734544492879577,	! slinch in^-3
MP,ALPX,49,6.66666666666667e-06,	! F^-1
MP,C,49,373722.969668162,	! in^2 s^-2 F^-1
MP,KXX,49,7.55607836445752,	! slinch in s^-3 F^-1
MP,RSVX,49,8.52348993288591,	! ohm cmil in^-1
MP,EX,49,29007547.5428236,	! slinch s^-2 in^-1
MP,NUXY,49,0.3,
MP,MURX,49,10000,

Temperature = 'TEMP' ! Temperature
MP,DENS,50,0.000734544492879577,	! slinch in^-3
MP,ALPX,50,6.66666666666667e-06,	! F^-1
MP,C,50,373722.969668162,	! in^2 s^-2 F^-1
MP,KXX,50,7.55607836445752,	! slinch in s^-3 F^-1
MP,RSVX,50,8.52348993288591,	! ohm cmil in^-1
MP,EX,50,29007547.5428236,	! slinch s^-2 in^-1
MP,NUXY,50,0.3,
MP,MURX,50,10000,

Temperature = 'TEMP' ! Temperature
MP,DENS,51,0.000734544492879577,	! slinch in^-3
MP,ALPX,51,6.66666666666667e-06,	! F^-1
MP,C,51,373722.969668162,	! in^2 s^-2 F^-1
MP,KXX,51,7.55607836445752,	! slinch in s^-3 F^-1
MP,RSVX,51,8.52348993288591,	! ohm cmil in^-1
MP,EX,51,29007547.5428236,	! slinch s^-2 in^-1
MP,NUXY,51,0.3,
MP,MURX,51,10000,

Temperature = 'TEMP' ! Temperature
MP,DENS,52,0.000734544492879577,	! slinch in^-3
MP,ALPX,52,6.66666666666667e-06,	! F^-1
MP,C,52,373722.969668162,	! in^2 s^-2 F^-1
MP,KXX,52,7.55607836445752,	! slinch in s^-3 F^-1
MP,RSVX,52,8.52348993288591,	! ohm cmil in^-1
MP,EX,52,29007547.5428236,	! slinch s^-2 in^-1
MP,NUXY,52,0.3,
MP,MURX,52,10000,

Temperature = 'TEMP' ! Temperature
MP,DENS,53,0.000734544492879577,	! slinch in^-3
MP,ALPX,53,6.66666666666667e-06,	! F^-1
MP,C,53,373722.969668162,	! in^2 s^-2 F^-1
MP,KXX,53,7.55607836445752,	! slinch in s^-3 F^-1
MP,RSVX,53,8.52348993288591,	! ohm cmil in^-1
MP,EX,53,29007547.5428236,	! slinch s^-2 in^-1
MP,NUXY,53,0.3,
MP,MURX,53,10000,

Temperature = 'TEMP' ! Temperature
MP,DENS,54,0.000734544492879577,	! slinch in^-3
MP,ALPX,54,6.66666666666667e-06,	! F^-1
MP,C,54,373722.969668162,	! in^2 s^-2 F^-1
MP,KXX,54,7.55607836445752,	! slinch in s^-3 F^-1
MP,RSVX,54,8.52348993288591,	! ohm cmil in^-1
MP,EX,54,29007547.5428236,	! slinch s^-2 in^-1
MP,NUXY,54,0.3,
MP,MURX,54,10000,

Temperature = 'TEMP' ! Temperature
MP,DENS,55,0.000734544492879577,	! slinch in^-3
MP,ALPX,55,6.66666666666667e-06,	! F^-1
MP,C,55,373722.969668162,	! in^2 s^-2 F^-1
MP,KXX,55,7.55607836445752,	! slinch in s^-3 F^-1
MP,RSVX,55,8.52348993288591,	! ohm cmil in^-1
MP,EX,55,29007547.5428236,	! slinch s^-2 in^-1
MP,NUXY,55,0.3,
MP,MURX,55,10000,

Temperature = 'TEMP' ! Temperature
MP,DENS,56,0.000734544492879577,	! slinch in^-3
MP,ALPX,56,6.66666666666667e-06,	! F^-1
MP,C,56,373722.969668162,	! in^2 s^-2 F^-1
MP,KXX,56,7.55607836445752,	! slinch in s^-3 F^-1
MP,RSVX,56,8.52348993288591,	! ohm cmil in^-1
MP,EX,56,29007547.5428236,	! slinch s^-2 in^-1
MP,NUXY,56,0.3,
MP,MURX,56,10000,

Temperature = 'TEMP' ! Temperature
MP,DENS,57,0.000734544492879577,	! slinch in^-3
MP,ALPX,57,6.66666666666667e-06,	! F^-1
MP,C,57,373722.969668162,	! in^2 s^-2 F^-1
MP,KXX,57,7.55607836445752,	! slinch in s^-3 F^-1
MP,RSVX,57,8.52348993288591,	! ohm cmil in^-1
MP,EX,57,29007547.5428236,	! slinch s^-2 in^-1
MP,NUXY,57,0.3,
MP,MURX,57,10000,

Temperature = 'TEMP' ! Temperature
MP,DENS,58,0.000734544492879577,	! slinch in^-3
MP,ALPX,58,6.66666666666667e-06,	! F^-1
MP,C,58,373722.969668162,	! in^2 s^-2 F^-1
MP,KXX,58,7.55607836445752,	! slinch in s^-3 F^-1
MP,RSVX,58,8.52348993288591,	! ohm cmil in^-1
MP,EX,58,29007547.5428236,	! slinch s^-2 in^-1
MP,NUXY,58,0.3,
MP,MURX,58,10000,

Temperature = 'TEMP' ! Temperature
MP,DENS,59,0.000734544492879577,	! slinch in^-3
MP,ALPX,59,6.66666666666667e-06,	! F^-1
MP,C,59,373722.969668162,	! in^2 s^-2 F^-1
MP,KXX,59,7.55607836445752,	! slinch in s^-3 F^-1
MP,RSVX,59,8.52348993288591,	! ohm cmil in^-1
MP,EX,59,29007547.5428236,	! slinch s^-2 in^-1
MP,NUXY,59,0.3,
MP,MURX,59,10000,

Temperature = 'TEMP' ! Temperature
MP,DENS,60,0.000734544492879577,	! slinch in^-3
MP,ALPX,60,6.66666666666667e-06,	! F^-1
MP,C,60,373722.969668162,	! in^2 s^-2 F^-1
MP,KXX,60,7.55607836445752,	! slinch in s^-3 F^-1
MP,RSVX,60,8.52348993288591,	! ohm cmil in^-1
MP,EX,60,29007547.5428236,	! slinch s^-2 in^-1
MP,NUXY,60,0.3,
MP,MURX,60,10000,

Temperature = 'TEMP' ! Temperature
MP,DENS,61,0.000734544492879577,	! slinch in^-3
MP,ALPX,61,6.66666666666667e-06,	! F^-1
MP,C,61,373722.969668162,	! in^2 s^-2 F^-1
MP,KXX,61,7.55607836445752,	! slinch in s^-3 F^-1
MP,RSVX,61,8.52348993288591,	! ohm cmil in^-1
MP,EX,61,29007547.5428236,	! slinch s^-2 in^-1
MP,NUXY,61,0.3,
MP,MURX,61,10000,

Temperature = 'TEMP' ! Temperature
MP,DENS,62,0.000734544492879577,	! slinch in^-3
MP,ALPX,62,6.66666666666667e-06,	! F^-1
MP,C,62,373722.969668162,	! in^2 s^-2 F^-1
MP,KXX,62,7.55607836445752,	! slinch in s^-3 F^-1
MP,RSVX,62,8.52348993288591,	! ohm cmil in^-1
MP,EX,62,29007547.5428236,	! slinch s^-2 in^-1
MP,NUXY,62,0.3,
MP,MURX,62,10000,

Temperature = 'TEMP' ! Temperature
MP,DENS,63,0.000734544492879577,	! slinch in^-3
MP,ALPX,63,6.66666666666667e-06,	! F^-1
MP,C,63,373722.969668162,	! in^2 s^-2 F^-1
MP,KXX,63,7.55607836445752,	! slinch in s^-3 F^-1
MP,RSVX,63,8.52348993288591,	! ohm cmil in^-1
MP,EX,63,29007547.5428236,	! slinch s^-2 in^-1
MP,NUXY,63,0.3,
MP,MURX,63,10000,

Temperature = 'TEMP' ! Temperature
MP,DENS,64,0.000734544492879577,	! slinch in^-3
MP,ALPX,64,6.66666666666667e-06,	! F^-1
MP,C,64,373722.969668162,	! in^2 s^-2 F^-1
MP,KXX,64,7.55607836445752,	! slinch in s^-3 F^-1
MP,RSVX,64,8.52348993288591,	! ohm cmil in^-1
MP,EX,64,29007547.5428236,	! slinch s^-2 in^-1
MP,NUXY,64,0.3,
MP,MURX,64,10000,

Temperature = 'TEMP' ! Temperature
MP,DENS,65,0.000734544492879577,	! slinch in^-3
MP,ALPX,65,6.66666666666667e-06,	! F^-1
MP,C,65,373722.969668162,	! in^2 s^-2 F^-1
MP,KXX,65,7.55607836445752,	! slinch in s^-3 F^-1
MP,RSVX,65,8.52348993288591,	! ohm cmil in^-1
MP,EX,65,29007547.5428236,	! slinch s^-2 in^-1
MP,NUXY,65,0.3,
MP,MURX,65,10000,

Temperature = 'TEMP' ! Temperature
MP,DENS,66,0.000734544492879577,	! slinch in^-3
MP,ALPX,66,6.66666666666667e-06,	! F^-1
MP,C,66,373722.969668162,	! in^2 s^-2 F^-1
MP,KXX,66,7.55607836445752,	! slinch in s^-3 F^-1
MP,RSVX,66,8.52348993288591,	! ohm cmil in^-1
MP,EX,66,29007547.5428236,	! slinch s^-2 in^-1
MP,NUXY,66,0.3,
MP,MURX,66,10000,

Temperature = 'TEMP' ! Temperature
MP,DENS,67,0.000734544492879577,	! slinch in^-3
MP,ALPX,67,6.66666666666667e-06,	! F^-1
MP,C,67,373722.969668162,	! in^2 s^-2 F^-1
MP,KXX,67,7.55607836445752,	! slinch in s^-3 F^-1
MP,RSVX,67,8.52348993288591,	! ohm cmil in^-1
MP,EX,67,29007547.5428236,	! slinch s^-2 in^-1
MP,NUXY,67,0.3,
MP,MURX,67,10000,

Temperature = 'TEMP' ! Temperature
MP,DENS,68,0.000734544492879577,	! slinch in^-3
MP,ALPX,68,6.66666666666667e-06,	! F^-1
MP,C,68,373722.969668162,	! in^2 s^-2 F^-1
MP,KXX,68,7.55607836445752,	! slinch in s^-3 F^-1
MP,RSVX,68,8.52348993288591,	! ohm cmil in^-1
MP,EX,68,29007547.5428236,	! slinch s^-2 in^-1
MP,NUXY,68,0.3,
MP,MURX,68,10000,

Temperature = 'TEMP' ! Temperature
MP,DENS,69,0.000734544492879577,	! slinch in^-3
MP,ALPX,69,6.66666666666667e-06,	! F^-1
MP,C,69,373722.969668162,	! in^2 s^-2 F^-1
MP,KXX,69,7.55607836445752,	! slinch in s^-3 F^-1
MP,RSVX,69,8.52348993288591,	! ohm cmil in^-1
MP,EX,69,29007547.5428236,	! slinch s^-2 in^-1
MP,NUXY,69,0.3,
MP,MURX,69,10000,

Temperature = 'TEMP' ! Temperature
MP,DENS,70,0.000734544492879577,	! slinch in^-3
MP,ALPX,70,6.66666666666667e-06,	! F^-1
MP,C,70,373722.969668162,	! in^2 s^-2 F^-1
MP,KXX,70,7.55607836445752,	! slinch in s^-3 F^-1
MP,RSVX,70,8.52348993288591,	! ohm cmil in^-1
MP,EX,70,29007547.5428236,	! slinch s^-2 in^-1
MP,NUXY,70,0.3,
MP,MURX,70,10000,

Temperature = 'TEMP' ! Temperature
MP,DENS,71,0.000734544492879577,	! slinch in^-3
MP,ALPX,71,6.66666666666667e-06,	! F^-1
MP,C,71,373722.969668162,	! in^2 s^-2 F^-1
MP,KXX,71,7.55607836445752,	! slinch in s^-3 F^-1
MP,RSVX,71,8.52348993288591,	! ohm cmil in^-1
MP,EX,71,29007547.5428236,	! slinch s^-2 in^-1
MP,NUXY,71,0.3,
MP,MURX,71,10000,

Temperature = 'TEMP' ! Temperature
MP,DENS,72,0.000734544492879577,	! slinch in^-3
MP,ALPX,72,6.66666666666667e-06,	! F^-1
MP,C,72,373722.969668162,	! in^2 s^-2 F^-1
MP,KXX,72,7.55607836445752,	! slinch in s^-3 F^-1
MP,RSVX,72,8.52348993288591,	! ohm cmil in^-1
MP,EX,72,29007547.5428236,	! slinch s^-2 in^-1
MP,NUXY,72,0.3,
MP,MURX,72,10000,

Temperature = 'TEMP' ! Temperature
MP,DENS,73,0.000734544492879577,	! slinch in^-3
MP,ALPX,73,6.66666666666667e-06,	! F^-1
MP,C,73,373722.969668162,	! in^2 s^-2 F^-1
MP,KXX,73,7.55607836445752,	! slinch in s^-3 F^-1
MP,RSVX,73,8.52348993288591,	! ohm cmil in^-1
MP,EX,73,29007547.5428236,	! slinch s^-2 in^-1
MP,NUXY,73,0.3,
MP,MURX,73,10000,

Temperature = 'TEMP' ! Temperature
MP,DENS,74,0.000734544492879577,	! slinch in^-3
MP,ALPX,74,6.66666666666667e-06,	! F^-1
MP,C,74,373722.969668162,	! in^2 s^-2 F^-1
MP,KXX,74,7.55607836445752,	! slinch in s^-3 F^-1
MP,RSVX,74,8.52348993288591,	! ohm cmil in^-1
MP,EX,74,29007547.5428236,	! slinch s^-2 in^-1
MP,NUXY,74,0.3,
MP,MURX,74,10000,

Temperature = 'TEMP' ! Temperature
MP,DENS,75,0.000734544492879577,	! slinch in^-3
MP,ALPX,75,6.66666666666667e-06,	! F^-1
MP,C,75,373722.969668162,	! in^2 s^-2 F^-1
MP,KXX,75,7.55607836445752,	! slinch in s^-3 F^-1
MP,RSVX,75,8.52348993288591,	! ohm cmil in^-1
MP,EX,75,29007547.5428236,	! slinch s^-2 in^-1
MP,NUXY,75,0.3,
MP,MURX,75,10000,

Temperature = 'TEMP' ! Temperature
MP,DENS,76,0.000734544492879577,	! slinch in^-3
MP,ALPX,76,6.66666666666667e-06,	! F^-1
MP,C,76,373722.969668162,	! in^2 s^-2 F^-1
MP,KXX,76,7.55607836445752,	! slinch in s^-3 F^-1
MP,RSVX,76,8.52348993288591,	! ohm cmil in^-1
MP,EX,76,29007547.5428236,	! slinch s^-2 in^-1
MP,NUXY,76,0.3,
MP,MURX,76,10000,

Temperature = 'TEMP' ! Temperature
MP,DENS,77,0.000734544492879577,	! slinch in^-3
MP,ALPX,77,6.66666666666667e-06,	! F^-1
MP,C,77,373722.969668162,	! in^2 s^-2 F^-1
MP,KXX,77,7.55607836445752,	! slinch in s^-3 F^-1
MP,RSVX,77,8.52348993288591,	! ohm cmil in^-1
MP,EX,77,29007547.5428236,	! slinch s^-2 in^-1
MP,NUXY,77,0.3,
MP,MURX,77,10000,

Temperature = 'TEMP' ! Temperature
MP,DENS,78,0.000734544492879577,	! slinch in^-3
MP,ALPX,78,6.66666666666667e-06,	! F^-1
MP,C,78,373722.969668162,	! in^2 s^-2 F^-1
MP,KXX,78,7.55607836445752,	! slinch in s^-3 F^-1
MP,RSVX,78,8.52348993288591,	! ohm cmil in^-1
MP,EX,78,29007547.5428236,	! slinch s^-2 in^-1
MP,NUXY,78,0.3,
MP,MURX,78,10000,

Temperature = 'TEMP' ! Temperature
MP,DENS,79,0.000734544492879577,	! slinch in^-3
MP,ALPX,79,6.66666666666667e-06,	! F^-1
MP,C,79,373722.969668162,	! in^2 s^-2 F^-1
MP,KXX,79,7.55607836445752,	! slinch in s^-3 F^-1
MP,RSVX,79,8.52348993288591,	! ohm cmil in^-1
MP,EX,79,29007547.5428236,	! slinch s^-2 in^-1
MP,NUXY,79,0.3,
MP,MURX,79,10000,

Temperature = 'TEMP' ! Temperature
MP,DENS,80,0.000734544492879577,	! slinch in^-3
MP,ALPX,80,6.66666666666667e-06,	! F^-1
MP,C,80,373722.969668162,	! in^2 s^-2 F^-1
MP,KXX,80,7.55607836445752,	! slinch in s^-3 F^-1
MP,RSVX,80,8.52348993288591,	! ohm cmil in^-1
MP,EX,80,29007547.5428236,	! slinch s^-2 in^-1
MP,NUXY,80,0.3,
MP,MURX,80,10000,

Temperature = 'TEMP' ! Temperature
MP,DENS,81,0.000734544492879577,	! slinch in^-3
MP,ALPX,81,6.66666666666667e-06,	! F^-1
MP,C,81,373722.969668162,	! in^2 s^-2 F^-1
MP,KXX,81,7.55607836445752,	! slinch in s^-3 F^-1
MP,RSVX,81,8.52348993288591,	! ohm cmil in^-1
MP,EX,81,29007547.5428236,	! slinch s^-2 in^-1
MP,NUXY,81,0.3,
MP,MURX,81,10000,

Temperature = 'TEMP' ! Temperature
MP,DENS,82,0.000734544492879577,	! slinch in^-3
MP,ALPX,82,6.66666666666667e-06,	! F^-1
MP,C,82,373722.969668162,	! in^2 s^-2 F^-1
MP,KXX,82,7.55607836445752,	! slinch in s^-3 F^-1
MP,RSVX,82,8.52348993288591,	! ohm cmil in^-1
MP,EX,82,29007547.5428236,	! slinch s^-2 in^-1
MP,NUXY,82,0.3,
MP,MURX,82,10000,

Temperature = 'TEMP' ! Temperature
MP,DENS,83,0.000734544492879577,	! slinch in^-3
MP,ALPX,83,6.66666666666667e-06,	! F^-1
MP,C,83,373722.969668162,	! in^2 s^-2 F^-1
MP,KXX,83,7.55607836445752,	! slinch in s^-3 F^-1
MP,RSVX,83,8.52348993288591,	! ohm cmil in^-1
MP,EX,83,29007547.5428236,	! slinch s^-2 in^-1
MP,NUXY,83,0.3,
MP,MURX,83,10000,

Temperature = 'TEMP' ! Temperature
MP,DENS,84,0.000734544492879577,	! slinch in^-3
MP,ALPX,84,6.66666666666667e-06,	! F^-1
MP,C,84,373722.969668162,	! in^2 s^-2 F^-1
MP,KXX,84,7.55607836445752,	! slinch in s^-3 F^-1
MP,RSVX,84,8.52348993288591,	! ohm cmil in^-1
MP,EX,84,29007547.5428236,	! slinch s^-2 in^-1
MP,NUXY,84,0.3,
MP,MURX,84,10000,

Temperature = 'TEMP' ! Temperature
MP,DENS,85,0.000734544492879577,	! slinch in^-3
MP,ALPX,85,6.66666666666667e-06,	! F^-1
MP,C,85,373722.969668162,	! in^2 s^-2 F^-1
MP,KXX,85,7.55607836445752,	! slinch in s^-3 F^-1
MP,RSVX,85,8.52348993288591,	! ohm cmil in^-1
MP,EX,85,29007547.5428236,	! slinch s^-2 in^-1
MP,NUXY,85,0.3,
MP,MURX,85,10000,

Temperature = 'TEMP' ! Temperature
MP,DENS,86,0.000734544492879577,	! slinch in^-3
MP,ALPX,86,6.66666666666667e-06,	! F^-1
MP,C,86,373722.969668162,	! in^2 s^-2 F^-1
MP,KXX,86,7.55607836445752,	! slinch in s^-3 F^-1
MP,RSVX,86,8.52348993288591,	! ohm cmil in^-1
MP,EX,86,29007547.5428236,	! slinch s^-2 in^-1
MP,NUXY,86,0.3,
MP,MURX,86,10000,

Temperature = 'TEMP' ! Temperature
MP,DENS,87,0.000734544492879577,	! slinch in^-3
MP,ALPX,87,6.66666666666667e-06,	! F^-1
MP,C,87,373722.969668162,	! in^2 s^-2 F^-1
MP,KXX,87,7.55607836445752,	! slinch in s^-3 F^-1
MP,RSVX,87,8.52348993288591,	! ohm cmil in^-1
MP,EX,87,29007547.5428236,	! slinch s^-2 in^-1
MP,NUXY,87,0.3,
MP,MURX,87,10000,

Temperature = 'TEMP' ! Temperature
MP,DENS,88,0.000734544492879577,	! slinch in^-3
MP,ALPX,88,6.66666666666667e-06,	! F^-1
MP,C,88,373722.969668162,	! in^2 s^-2 F^-1
MP,KXX,88,7.55607836445752,	! slinch in s^-3 F^-1
MP,RSVX,88,8.52348993288591,	! ohm cmil in^-1
MP,EX,88,29007547.5428236,	! slinch s^-2 in^-1
MP,NUXY,88,0.3,
MP,MURX,88,10000,

Temperature = 'TEMP' ! Temperature
MP,DENS,89,0.000734544492879577,	! slinch in^-3
MP,ALPX,89,6.66666666666667e-06,	! F^-1
MP,C,89,373722.969668162,	! in^2 s^-2 F^-1
MP,KXX,89,7.55607836445752,	! slinch in s^-3 F^-1
MP,RSVX,89,8.52348993288591,	! ohm cmil in^-1
MP,EX,89,29007547.5428236,	! slinch s^-2 in^-1
MP,NUXY,89,0.3,
MP,MURX,89,10000,

!************************* Model Summary ********************
! Solid,	Structural Steel,	matid,	1
! Solid,	Wood,	matid,	2
! Solid,	Wood,	matid,	3
! Solid,	Aluminum Alloy,	matid,	4
! Solid,	Aluminum Alloy,	matid,	5
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! Solid111111,	Structural Steel,	matid,	89
!************************* End Model Summary ********************
/com,*********** Fixed Supports ***********
CMBLOCK,_FIXEDSU,NODE,       45
(8i10)
      2104     -2109      2129     -2134      5233     -5484     13121     13122
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cmsel,s,_FIXEDSU
d,all,all
nsel,all
/com,*********** Define Force Using Surface Effect Elements ***********
local,12,0,0.,0.,0.,0.,0.,0.
csys,0
et,90,154
MAT,90 $ TYPE,90 $ REAL,90 $ SECNUM,90 $ ESYS,12    ! ELEMNODES = 8
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esel,s,type,,90
keyop,90,2,1        ! Apply load in local coordinate system
keyop,90,7,1        ! Use original area so load is constant in large deformation
esel,all
/com,*********** Define Force Using Surface Effect Elements ***********
local,13,0,0.,0.,0.,0.,0.,0.
csys,0
et,91,154
MAT,91 $ TYPE,91 $ REAL,91 $ SECNUM,91 $ ESYS,13    ! ELEMNODES = 8
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esel,s,type,,91
keyop,91,2,1        ! Apply load in local coordinate system
keyop,91,7,1        ! Use original area so load is constant in large deformation
esel,all
/com,*********** Define Force Using Surface Effect Elements ***********
local,14,0,0.,0.,0.,0.,0.,0.
csys,0
et,92,154
MAT,92 $ TYPE,92 $ REAL,92 $ SECNUM,92 $ ESYS,14    ! ELEMNODES = 8
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esel,s,type,,92
keyop,92,2,1        ! Apply load in local coordinate system
keyop,92,7,1        ! Use original area so load is constant in large deformation
esel,all
/com,*********** Define Force Using Surface Effect Elements ***********
local,15,0,0.,0.,0.,0.,0.,0.
csys,0
et,93,154
MAT,93 $ TYPE,93 $ REAL,93 $ SECNUM,93 $ ESYS,15    ! ELEMNODES = 8
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esel,s,type,,93
keyop,93,2,1        ! Apply load in local coordinate system
keyop,93,7,1        ! Use original area so load is constant in large deformation
esel,all
fini
/com,****************************************************************************
/com,*************************    SOLUTION       ********************************
/com,****************************************************************************
/solu
antype,0                   ! static analysis
_thickRatio=  0     ! Ratio of thick parts in the model
eqsl,sparse,,,,,1
cntr,print,1               ! print out contact info and also make no initial contact an error
cncheck,dmp		!	Enable program controlled contact splitting for distributed memory parallel run
dmpoption,emat,no             ! Don't combine emat file for DANSYS
dmpoption,esav,no             ! Don't combine esav file for DANSYS
nldiag,cont,iter           ! print out contact info each equilibrium iteration
rescontrol,,none                 ! Do not keep any restart files
/com,****************************************************
/com,******************* SOLVE FOR LS 1 OF 1 ****************
esel,s,type,,90
nsle
sfe,all,1,pres,1,0.
sfe,all,2,pres,1,-0.399999999932226
sfe,all,3,pres,1,0.
esel,s,type,,91
nsle
sfe,all,1,pres,1,0.
sfe,all,2,pres,1,-1.23771699993429
sfe,all,3,pres,1,0.
esel,s,type,,92
nsle
sfe,all,1,pres,1,0.
sfe,all,2,pres,1,-0.239999999959336
sfe,all,3,pres,1,0.
esel,s,type,,93
nsle
sfe,all,1,pres,1,0.
sfe,all,2,pres,1,-0.199999999966114
sfe,all,3,pres,1,0.
nsel,all
esel,all
nsub,1,1,1
time,1.
outres,erase
outres,all,none
outres,nsol,all,
outres,rsol,all
outres,eangl,all
outres,etmp,all
outres,veng,all
outres,strs,all,
outres,epel,all,
outres,eppl,all,
outres,cont,all,
! *********** WB SOLVE COMMAND ***********
! check interactive state
*get,ANSINTER_,active,,int
*if,ANSINTER_,ne,0,then
/eof
*endif
solve
/com *************** Write FE CONNECTORS *********
CEWRITE,file,ce,,INTE
/com,****************************************************
/com,*************** FINISHED SOLVE FOR LS 1 *************
fini
*get,_NSOLTHREADS,active,0,ntfs
*get,_NSOLPROCESSES,active,0,npfs
/post1
fini
